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/BATCH
/COM,ANSYS RELEASE 2023 R1           BUILD 23.1      UP20221128       20:00:52
/input,menust,tmp,''
/GST,ON
/PLO,INFO,3
/GRO,CURL,ON
/CPLANE,1
WPSTYLE,,,,,,,,0
/PREP7
/NOPR
KEYW,PR_SET,1
KEYW,PR_STRUC,1
KEYW,PR_THERM,0
KEYW,PR_FLUID,0
KEYW,PR_ELMAG,0
KEYW,MAGNOD,0
KEYW,MAGEDG,0
KEYW,MAGHFE,0
KEYW,MAGELC,0
KEYW,PR_MULTI,0
/GO
/COM,
/COM,Preferences for GUI filtering have been set to display:
/COM,  Structural
ET,1,LINK180
MPREAD,'TenseMat','mp','..\..\..\..\'
SECTYPE,1,LINK, ,LS1
SECDATA,0.0001,
SECCONTROL,0,0
SECTYPE,2,LINK, ,SS1
SECDATA,0.0020106,
SECCONTROL,0,0
K,1,0.1082550,0,0,
K,2,-0.108255,0,0.125,
K,3,-0.108255,0,-0.125,
K,4,0.125,0.5,0.108255,
K,5,-0.125,0.5,0.108255,
K,6,0,0.5,-0.108255,
LSTR,       1,       5
LSTR,       2,       6
LSTR,       3,       4
GPLOT
FLST,5,3,4,ORDE,2
FITEM,5,1
FITEM,5,-3
CM,_Y,LINE
LSEL, , , ,P51X
CM,_Y1,LINE
CMSEL,,_Y
LESIZE,_Y1, , ,15, , , , ,1
FLST,2,3,4,ORDE,2
FITEM,2,1
FITEM,2,-3
LMESH,P51X
/SHRINK,0
/ESHAPE,1.0
/EFACET,1
/RATIO,1,1,1
/CFORMAT,32,0
LSTR,       4,       5
LSTR,       5,       6
LSTR,       6,       4
FLST,5,3,4,ORDE,2
FITEM,5,4
FITEM,5,-6
CM,_Y,LINE
LSEL, , , ,P51X
CM,_Y1,LINE
CMSEL,S,_Y
CMSEL,S,_Y1
LATT,2, ,1, , , ,2
CMSEL,S,_Y
CMDELE,_Y
CMDELE,_Y1
FLST,5,3,4,ORDE,2
FITEM,5,4
FITEM,5,-6
CM,_Y,LINE
LSEL, , , ,P51X
CM,_Y1,LINE
CMSEL,,_Y
LESIZE,_Y1, , ,15, , , , ,1
FLST,2,3,4,ORDE,2
FITEM,2,4
FITEM,2,-6
LMESH,P51X
GPLOT
FLST,2,3,4,ORDE,2
FITEM,2,4
FITEM,2,-6
LDELE,P51X
FLST,2,3,4,ORDE,2
FITEM,2,4
FITEM,2,-6
LCLEAR,P51X
FLST,2,3,4,ORDE,2
FITEM,2,4
FITEM,2,-6
LDELE,P51X
GPLOT
N,3,0.125,0.5,0.108255,,,,
N,3,0.125,0.5,0.108255,,,,
/BATCH
/COM,ANSYS RELEASE 2023 R1           BUILD 23.1      UP20221128       08:45:57
/input,menust,tmp,''
/GST,ON
/PLO,INFO,3
/GRO,CURL,ON
/CPLANE,1
WPSTYLE,,,,,,,,0
RESUME
/COM,ANSYS RELEASE 2023 R1           BUILD 23.1      UP20221128       08:51:29
RESUME,'file','dbb','../../APDL/ANSYS'
/COM,ANSYS RELEASE 2023 R1           BUILD 23.1      UP20221128       08:52:11
/CLEAR,NOSTART
/COM,ANSYS RELEASE 2023 R1           BUILD 23.1      UP20221128       09:05:58
/NOPR
KEYW,PR_SET,1
KEYW,PR_STRUC,1
KEYW,PR_THERM,1
KEYW,PR_FLUID,0
KEYW,PR_ELMAG,0
KEYW,MAGNOD,0
KEYW,MAGEDG,0
KEYW,MAGHFE,0
KEYW,MAGELC,0
KEYW,PR_MULTI,1
/GO
/COM,
/COM,Preferences for GUI filtering have been set to display:
/COM,  Structural
/COM,  Thermal
/PREP7
ET,1,LINK180
ET,2,BEAM188
MPREAD,'TenseMat','mp','..\..\..\..\'
SECTYPE,1,LINK, ,Squarebar
SECDATA,0.0001,
SECCONTROL,0,0
SECTYPE,1,LINK, ,Squareba
SECDATA,0.0001,
SECCONTROL,0,0
K,1,0.1082550,0,0,
K,2,-0.108255,0,0.125,
K,3,-0.108255,0,-0.125,
K,3,-0.108255,0,-0.125,
K,4,0.12500,0.5,0.108255,
K,5,-0.125,0.5,0.108255,
K,6,0,0.5,-0.108255,
LSTR,       1,       5
LSTR,       2,       6
LSTR,       3,       4
FLST,5,3,4,ORDE,2
FITEM,5,1
FITEM,5,-3
CM,_Y,LINE
LSEL, , , ,P51X
CM,_Y1,LINE
CMSEL,S,_Y
CMSEL,S,_Y1
LATT,1, ,1, , , ,1
CMSEL,S,_Y
CMDELE,_Y
CMDELE,_Y1
FLST,5,3,4,ORDE,2
FITEM,5,1
FITEM,5,-3
CM,_Y,LINE
LSEL, , , ,P51X
CM,_Y1,LINE
CMSEL,,_Y
LESIZE,_Y1, , ,15, , , , ,1
FLST,2,3,4,ORDE,2
FITEM,2,1
FITEM,2,-3
LMESH,P51X
GPLOT
/SHRINK,0
/ESHAPE,1.0
/EFACET,1
/RATIO,1,1,1
/CFORMAT,32,0
SECTYPE,2,LINK, ,smallsquare1
SECDATA,0.002512,
SECCONTROL,0,0
LSTR,       4,       5
LSTR,       5,       6
LSTR,       6,       4
LSTR,       1,       4
LSTR,       2,       5
LSTR,       3,       6
FLST,5,6,4,ORDE,2
FITEM,5,4
FITEM,5,-9
CM,_Y,LINE
LSEL, , , ,P51X
CM,_Y1,LINE
CMSEL,S,_Y
CMSEL,S,_Y1
LATT,2, ,1, , , ,2
CMSEL,S,_Y
CMDELE,_Y
CMDELE,_Y1
FLST,5,6,4,ORDE,2
FITEM,5,4
FITEM,5,-9
CM,_Y,LINE
LSEL, , , ,P51X
CM,_Y1,LINE
CMSEL,S,_Y
CMSEL,S,_Y1
LATT,2, ,1, , , ,2
CMSEL,S,_Y
CMDELE,_Y
CMDELE,_Y1
FLST,5,6,4,ORDE,2
FITEM,5,4
FITEM,5,-9
CM,_Y,LINE
LSEL, , , ,P51X
CM,_Y1,LINE
CMSEL,,_Y
LESIZE,_Y1, , ,15, , , , ,1
FLST,2,6,4,ORDE,2
FITEM,2,4
FITEM,2,-9
LMESH,P51X
GPLOT
FLST,2,6,4,ORDE,2
FITEM,2,4
FITEM,2,-9
LCLEAR,P51X
GPLOT
SAVE
SAVE
SAVE
SAVE,'TenseBar','','D:\Fall Sem\Tense-apdl\barwithlink_files\dp0\APDL-1\ANSYS\'
SECTYPE,2,LINK, ,smallsqu
SECDATA,0.002016,
SECCONTROL,0,0
SECTYPE,2,LINK, ,smallsqu
SECDATA,0.002016,
SECCONTROL,0,0
FLST,5,3,4,ORDE,2
FITEM,5,4
FITEM,5,-6
CM,_Y,LINE
LSEL, , , ,P51X
CM,_Y1,LINE
CMSEL,S,_Y
CMSEL,S,_Y1
LATT,2, ,1, , , ,2
CMSEL,S,_Y
CMDELE,_Y
CMDELE,_Y1
GPLOT
FLST,5,3,4,ORDE,2
FITEM,5,4
FITEM,5,-6
CM,_Y,LINE
LSEL, , , ,P51X
CM,_Y1,LINE
CMSEL,S,_Y
CMSEL,S,_Y1
LATT,2, ,1, , , ,2
CMSEL,S,_Y
CMDELE,_Y
CMDELE,_Y1
GPLOT
FLST,5,3,4,ORDE,2
FITEM,5,4
FITEM,5,-6
CM,_Y,LINE
LSEL, , , ,P51X
CM,_Y1,LINE
CMSEL,,_Y
LESIZE,_Y1, , ,15, , , , ,1
/SHRINK,0
/ESHAPE,1
/EFACET,1
/RATIO,1,1,1
/CFORMAT,32,0
/SHRINK,0
/ESHAPE,1
/EFACET,1
/RATIO,1,1,1
/CFORMAT,32,0
FLST,2,3,4,ORDE,2
FITEM,2,4
FITEM,2,-6
LMESH,P51X
SECTYPE,2,LINK, ,smallsqu
SECDATA,0.0002016,
SECCONTROL,0,0
SECTYPE,1,LINK, ,Squareba
SECDATA,0.0001,
SECCONTROL,0,0
GPLOT
/SHRINK,0
/ESHAPE,1
/EFACET,1
/RATIO,1,1,1
/CFORMAT,32,0
SAVE
SAVE
SAVE
FINISH
! /EXIT,ALL
