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/BATCH
/COM,ANSYS RELEASE 2023 R1           BUILD 23.1      UP20221128       18:40:11
/input,menust,tmp,''
/GST,ON
/PLO,INFO,3
/GRO,CURL,ON
/CPLANE,1
WPSTYLE,,,,,,,,0
/NOPR
KEYW,PR_SET,1
KEYW,PR_STRUC,1
KEYW,PR_THERM,0
KEYW,PR_FLUID,0
KEYW,PR_ELMAG,0
KEYW,MAGNOD,0
KEYW,MAGEDG,0
KEYW,MAGHFE,0
KEYW,MAGELC,0
KEYW,PR_MULTI,0
/GO
/COM,
/COM,Preferences for GUI filtering have been set to display:
/COM,  Structural
/PREP7
ET,1,LINK180
MPREAD,'TenseMat','mp','D:\Fall Sem\Tense-apdl\'
MPDE,ALL,2
TBDE,ALL,2
MPTEMP,,,,,,,
/units,si
SECTYPE,1,LINK, ,square
SECDATA,0.1,
SECCONTROL,0,0
K,1,0,0,0,
K,2,0.5,0,0,
K,2,0.5,0,0,
/NUMBER,0
LSTR,       1,       2
/NUMBER,0
GPLOT
CM,_Y,LINE
LSEL, , , ,       1
CM,_Y1,LINE
CMSEL,S,_Y
CMSEL,S,_Y1
LATT,1, ,1, , , ,1
CMSEL,S,_Y
CMDELE,_Y
CMDELE,_Y1
FLST,5,1,4,ORDE,1
FITEM,5,1
CM,_Y,LINE
LSEL, , , ,P51X
CM,_Y1,LINE
CMSEL,,_Y
LESIZE,_Y1, , ,10, , , , ,1
FLST,5,1,4,ORDE,1
FITEM,5,1
CM,_Y,LINE
LSEL, , , ,P51X
CM,_Y1,LINE
CMSEL,,_Y
LESIZE,_Y1, , ,10, , , , ,1
LMESH,       1
GPLOT
/SHRINK,0
/ESHAPE,1.0
/EFACET,1
/RATIO,1,1,1
/CFORMAT,32,0
SECTYPE,1,LINK, ,square
SECDATA,0.0001,
SECCONTROL,0,0
SECTYPE,1,LINK, ,square
SECDATA,0.0001,
SECCONTROL,0,0
/SHRINK,0
/ESHAPE,0.0
/EFACET,1
/RATIO,1,1,1
/CFORMAT,32,0
/SHRINK,0
/ESHAPE,1.0
/EFACET,1
/RATIO,1,1,1
/CFORMAT,32,0
FLST,2,1,3,ORDE,1
FITEM,2,1
/GO
DK,P51X, , , ,0,ALL, , , , , ,
FLST,2,1,3,ORDE,1
FITEM,2,2
/GO
FK,P51X,FX,10e5
FINISH
/SOL
/STATUS,SOLU
SOLVE
FINISH
/POST1
PLDISP,1
PLDISP,1
PLDISP,1
ANDSCL,10,0.5
/EFACET,1
PLNSOL, U,X, 0,1.0
PRNSOL,U,X
PRNSOL,U,X
SAVE
SAVE
SAVE
FINISH
! /EXIT,NOSAV
/BATCH
/COM,ANSYS RELEASE 2023 R1           BUILD 23.1      UP20221128       10:44:13
/input,menust,tmp,''
/GST,ON
/PLO,INFO,3
/GRO,CURL,ON
/CPLANE,1
WPSTYLE,,,,,,,,0
RESUME,'file','dbb','.'
/COM,ANSYS RELEASE 2023 R1           BUILD 23.1      UP20221128       10:44:56
RESUME
/COM,ANSYS RELEASE 2023 R1           BUILD 23.1      UP20221128       10:44:58
RESUME
/COM,ANSYS RELEASE 2023 R1           BUILD 23.1      UP20221128       10:45:01
/POST1
/SHOW,WIN32C
SET,FIRST
/PLOPTS,INFO,3
/CONTOUR,ALL,18
/NUMBER,1
PLNSOL,EPEL,X
! /UIS,ABORT,1
/SHOW,WIN32
FINISH
/PREP7
FLST,2,1,3
FITEM,2,2
FLST,3,1,8
FITEM,3,0.5,0,0
KMODIF,P51X,P51X
GPLOT
/SHRINK,0
/ESHAPE,1
/EFACET,1
/RATIO,1,1,1
/CFORMAT,32,0
RESUME
/COM,ANSYS RELEASE 2023 R1           BUILD 23.1      UP20221128       11:05:30
RESUME
/COM,ANSYS RELEASE 2023 R1           BUILD 23.1      UP20221128       11:05:34
FLST,2,1,3
FITEM,2,2
FLST,3,1,8
FITEM,3,0.5,0,0
KMODIF,P51X,P51X
FLST,2,1,3
FITEM,2,2
FLST,3,1,8
FITEM,3,0.5,0,0
KMODIF,P51X,P51X
RESUME
/COM,ANSYS RELEASE 2023 R1           BUILD 23.1      UP20221128       11:06:31
KDELE,       2
KCLEAR,       2
LCLEAR,       1
KDELE,       2
LDELE,       1
KDELE,       2
K,2,0,0.5,0,
K,2,0,0.5,0,
GPLOT
LSTR,       1,       2
CM,_Y,LINE
LSEL, , , ,       1
CM,_Y1,LINE
CMSEL,S,_Y
CMSEL,S,_Y1
LATT,1, ,1, , , ,1
CMSEL,S,_Y
CMDELE,_Y
CMDELE,_Y1
FLST,5,1,4,ORDE,1
FITEM,5,1
CM,_Y,LINE
LSEL, , , ,P51X
CM,_Y1,LINE
CMSEL,,_Y
LESIZE,_Y1, , ,10, , , , ,1
LMESH,       1
LSCLEAR,ALL
FLST,2,1,3,ORDE,1
FITEM,2,1
/GO
DK,P51X, , , ,0,ALL, , , , , ,
FLST,2,1,3,ORDE,1
FITEM,2,2
/GO
FK,P51X,FY,100
FINISH
/SOL
/STATUS,SOLU
SOLVE
FINISH
/POST1
/SHOW,WIN32C
SET,FIRST
/PLOPTS,INFO,3
/CONTOUR,ALL,18
/NUMBER,1
PLNSOL,U,Y
PLDISP,0
ANDSCL,10,0.5
! /UIS,ABORT,1
/SHOW,WIN32
FINISH
! /EXIT,NOSAV
/BATCH
/COM,ANSYS RELEASE 2023 R1           BUILD 23.1      UP20221128       11:15:18
/input,menust,tmp,''
/GST,ON
/PLO,INFO,3
/GRO,CURL,ON
/CPLANE,1
WPSTYLE,,,,,,,,0
RESUME,'file','dbb','.'
/COM,ANSYS RELEASE 2023 R1           BUILD 23.1      UP20221128       11:16:27
/POST1
/SHOW,WIN32C
FINISH
/CLEAR
/COM,ANSYS RELEASE 2023 R1           BUILD 23.1      UP20221128       11:16:59
/input,start,ans,'C:\Program Files\ANSYS Inc\ANSYS Student\v231\ANSYS\apdl\'
/POST1
INRES,ALL
FILE,'file','rst','.'
SET,LAST
SET,FIRST
/PLOPTS,INFO,3
/CONTOUR,ALL,18
/NUMBER,1
PLNSOL,U,Y
PLDISP,0
ANDSCL,10,0.5
! /UIS,ABORT,1
/SHOW,WIN32
FINISH
! /EXIT,NOSAV
