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/BATCH
/COM,ANSYS RELEASE 2023 R1           BUILD 23.1      UP20221128       12:25:00
/input,menust,tmp,''
/GST,ON
/PLO,INFO,3
/GRO,CURL,ON
/CPLANE,1
WPSTYLE,,,,,,,,0
/NOPR
KEYW,PR_SET,1
KEYW,PR_STRUC,1
KEYW,PR_THERM,0
KEYW,PR_FLUID,0
KEYW,PR_ELMAG,0
KEYW,MAGNOD,0
KEYW,MAGEDG,0
KEYW,MAGHFE,0
KEYW,MAGELC,0
KEYW,PR_MULTI,0
/GO
/COM,
/COM,Preferences for GUI filtering have been set to display:
/COM,  Structural
/PREP7
ET,1,LINK180
FINISH
! /EXIT,NOSAV
/BATCH
/COM,ANSYS RELEASE 2023 R1           BUILD 23.1      UP20221128       13:36:06
/input,menust,tmp,''
/GST,ON
/PLO,INFO,3
/GRO,CURL,ON
/CPLANE,1
WPSTYLE,,,,,,,,0
/NOPR
KEYW,PR_SET,1
KEYW,PR_STRUC,1
KEYW,PR_THERM,0
KEYW,PR_FLUID,0
KEYW,PR_ELMAG,0
KEYW,MAGNOD,0
KEYW,MAGEDG,0
KEYW,MAGHFE,0
KEYW,MAGELC,0
KEYW,PR_MULTI,0
/GO
/COM,
/COM,Preferences for GUI filtering have been set to display:
/COM,  Structural
/PREP7
ET,1,LINK180
MPTEMP,,,,,,,,
MPTEMP,1,0
MPDATA,EX,1,,7.5999e+10
MPDATA,PRXY,1,,0.3
MPTEMP,,,,,,,,
MPTEMP,1,0
MPDE,EX,1
MPDE,PRXY,1
MPDATA,EX,1,,7.5999E+10
MPDATA,PRXY,1,,0.3
MPTEMP,,,,,,,,
MPTEMP,1,0
MPDATA,DENS,1,,7870
MPTEMP,,,,,,,,
MPTEMP,1,0
UIMP,1,REFT,,,
MPDATA,ALPX,1,,6.5e-06
MPTEMP,,,,,,,,
MPTEMP,1,0
MPDATA,EX,2,,2.0604e+11
MPDATA,PRXY,2,,0.3
MPTEMP,,,,,,,,
MPTEMP,1,0
MPDATA,DENS,2,,3.935e+05
MPTEMP,,,,,,,,
MPTEMP,1,0
UIMP,2,REFT,,,
MPDATA,ALPX,2,,6.5e-06
SLIST, , , ,BRIEF,ALL
K,1,0.108255,0,0,
K,2,-0.108255,0,0.125,
K,3,-0.108255,0,-0.125,
K,4,0.125,500,0.108255,
K,5,-0.125,500,0.108255,
K,6,0,500,-0.108255,
K,6,0,0.5,-0.108255,
K,3,0.125,0.5,0.108255,
K,4,-0.125,0.5,0.108255,
K,4,0.125,0.5,0.108255,
K,5,-0.125,0.5,0.108255,
K,6,0,0.5,-0.108255,
K,6,0,0.5,-0.108255,
K,1,0.108255,0,0,
K,2,-0.108255,0,0.125,
K,3,-0.108255,0,-0.125,
K,4,0.125,0.5,0.108255,
K,5,-0.125,0.5,0.108255,
K,6,0,0.5,-0.108255,
K,6,0,0.5,-0.108255,
LSTR,       1,       5
LSTR,       2,       6
LSTR,       3,       4
LSTR,       4,       5
LSTR,       5,       6
LSTR,       6,       4
LSTR,       1,       4
LSTR,       2,       5
LSTR,       3,       6
FLST,5,6,4,ORDE,2
FITEM,5,4
FITEM,5,-9
CM,_Y,LINE
LSEL, , , ,P51X
CM,_Y1,LINE
CMSEL,S,_Y
CMSEL,S,_Y1
LATT,2, ,1, , , ,
CMSEL,S,_Y
CMDELE,_Y
CMDELE,_Y1
FLST,5,3,4,ORDE,2
FITEM,5,1
FITEM,5,-3
CM,_Y,LINE
LSEL, , , ,P51X
CM,_Y1,LINE
CMSEL,S,_Y
CMSEL,S,_Y1
LATT,1, ,1, , , ,
CMSEL,S,_Y
CMDELE,_Y
CMDELE,_Y1
FLST,5,9,4,ORDE,2
FITEM,5,1
FITEM,5,-9
CM,_Y,LINE
LSEL, , , ,P51X
CM,_Y1,LINE
CMSEL,,_Y
LESIZE,_Y1, , ,10, , , , ,1
ANTYPE,0
FLST,5,9,4,ORDE,2
FITEM,5,1
FITEM,5,-9
CM,_Y,LINE
LSEL, , , ,P51X
CM,_Y1,LINE
CMSEL,S,_Y
MOPT,AMESH,DEFA
MOPT,QMESH,DEFA
MOPT,VMESH,DEFA
MOPT,TIMP,1
MOPT,PYRA,ON
MOPT,AORD,0
MOPT,SPLIT,1
MSHMID,0
MSHPATTERN,0
KEYW,ACCEPT,0
FLST,2,3,3,ORDE,2
FITEM,2,1
FITEM,2,-3
/GO
DK,P51X, , , ,0,ALL, , , , , ,
FLST,2,3,3,ORDE,2
FITEM,2,4
FITEM,2,-6
/GO
FK,P51X,FY,-1000
FINISH
/SOL
/STATUS,SOLU
SOLVE
/STATUS,SOLU
SOLVE
FINISH
/POST1
/BATCH
/COM,ANSYS RELEASE 2023 R1           BUILD 23.1      UP20221128       22:26:56
/input,menust,tmp,''
/GST,ON
/PLO,INFO,3
/GRO,CURL,ON
/CPLANE,1
WPSTYLE,,,,,,,,0
/BATCH
/COM,ANSYS RELEASE 2023 R1           BUILD 23.1      UP20221128       17:55:32
/input,menust,tmp,''
/GST,ON
/PLO,INFO,3
/GRO,CURL,ON
/CPLANE,1
WPSTYLE,,,,,,,,0
/NOPR
KEYW,PR_SET,1
KEYW,PR_STRUC,1
KEYW,PR_THERM,0
KEYW,PR_FLUID,0
KEYW,PR_ELMAG,0
KEYW,MAGNOD,0
KEYW,MAGEDG,0
KEYW,MAGHFE,0
KEYW,MAGELC,0
KEYW,PR_MULTI,0
/GO
/COM,
/COM,Preferences for GUI filtering have been set to display:
/COM,  Structural
/PREP7
ET,1,LINK180
MPTEMP,,,,,,,,
MPTEMP,1,0
MPDATA,EX,1,,7.5999E+10
MPDATA,PRXY,1,,.3
MPTEMP,,,,,,,,
MPTEMP,1,0
MPDE,EX,1
MPDE,PRXY,1
MPDATA,EX,1,,7.5999E+10
MPDATA,PRXY,1,,0.3
MPTEMP,,,,,,,,
MPTEMP,1,0
MPDATA,DENS,1,,7870
MPTEMP,,,,,,,,
MPTEMP,1,0
UIMP,1,REFT,,,
MPDATA,ALPX,1,,6.5E-06
MPTEMP,,,,,,,,
MPTEMP,1,0
MPDATA,EX,2,,2.0604E+11
MPDATA,PRXY,2,,0.3
MPTEMP,,,,,,,,
MPTEMP,1,0
MPDATA,DENS,2,,3.95E+05
MPTEMP,,,,,,,,
MPTEMP,1,0
UIMP,2,REFT,,,
MPDATA,ALPX,2,,6.5E-06
SAVE
SAVE
SAVE
/CWD,'D:\Fall Sem\Tense-apdl\mat-import -apdl_files\dp0\APDL-2\ANSYS'
K,1,0.108255,0,0,
K,2,-0.108255,0,0.125,
K,3,-0.108255,0,-0.125,
K,4,0.125,0.5,0.108255,
K,5,-0.125,0.5,0.108255,
K,6,0,0.5,-0.108255,
SAVE
L,       1,       5
L,       2,       6
L,       3,       4
L,       1,       4
L,       2,       5
L,       3,       6
L,       4,       5
L,       5,       6
L,       6,       4
FLST,5,6,4,ORDE,2
FITEM,5,4
FITEM,5,-9
CM,_Y,LINE
LSEL, , , ,P51X
CM,_Y1,LINE
CMSEL,S,_Y
CMSEL,S,_Y1
LATT,2, ,1, , , ,
CMSEL,S,_Y
CMDELE,_Y
CMDELE,_Y1
FLST,5,3,4,ORDE,2
FITEM,5,1
FITEM,5,-3
CM,_Y,LINE
LSEL, , , ,P51X
CM,_Y1,LINE
CMSEL,S,_Y
CMSEL,S,_Y1
LATT,1, ,1, , , ,
CMSEL,S,_Y
CMDELE,_Y
CMDELE,_Y1
FLST,5,9,4,ORDE,2
FITEM,5,1
FITEM,5,-9
CM,_Y,LINE
LSEL, , , ,P51X
CM,_Y1,LINE
CMSEL,,_Y
LESIZE,_Y1, , ,10, , , , ,1
ANTYPE,0
FLST,2,3,3,ORDE,2
FITEM,2,1
FITEM,2,-3
/GO
DK,P51X, , , ,0,ALL, , , , , ,
FLST,2,3,3,ORDE,2
FITEM,2,4
FITEM,2,-6
/GO
FK,P51X,FY,-1000
SAVE
SAVE
/units,si
/SHRINK,0
/ESHAPE,1.0
/EFACET,1
/RATIO,1,1,1
/CFORMAT,32,0
/SHRINK,0
/ESHAPE,1
/EFACET,1
/RATIO,1,1,1
/CFORMAT,32,0
FINISH
/SOL
/STATUS,SOLU
SOLVE
/STATUS,SOLU
SOLVE
FINISH
/PREP7
FINISH
/CLEAR,NOSTART
/COM,ANSYS RELEASE 2023 R1           BUILD 23.1      UP20221128       18:14:46
SAVE
SAVE
SAVE
SAVE
SAVE
/NOPR
KEYW,PR_SET,1
KEYW,PR_STRUC,1
KEYW,PR_THERM,0
KEYW,PR_FLUID,0
KEYW,PR_ELMAG,0
KEYW,MAGNOD,0
KEYW,MAGEDG,0
KEYW,MAGHFE,0
KEYW,MAGELC,0
KEYW,PR_MULTI,0
/GO
/COM,
/COM,Preferences for GUI filtering have been set to display:
/COM,  Structural
/PREP7
/units.si
/units,si
N,1,0.108255,0,0,,,,
N,2,-0.108255,0,0.125,,,,
N,3,-0.108255,0,-0.125,,,,
N,1,0.108255,0,0,,,,
N,2,-0.108255,0,0.125,,,,
N,3,-0.108255,0,-0.125,,,,
N,4,0.125,0.5,0.108255,,,,
N,5,-0.125,0.5,0.108255,,,,
N,6,0,0.5,-0.108255,,,,
SAVE
ET,1,LINK180
MPTEMP,,,,,,,,
MPTEMP,1,0
MPDATA,EX,1,,7.5999E+10
MPDATA,PRXY,1,,0.3
MPTEMP,,,,,,,,
MPTEMP,1,0
MPDATA,DENS,1,,7870
MPTEMP,,,,,,,,
MPTEMP,1,0
UIMP,1,REFT,,,
MPDATA,ALPX,1,,6.5E-06
MPTEMP,,,,,,,,
MPTEMP,1,0
UIMP,2,REFT,,,
MPDATA,ALPX,2,,6.5E-06
MPTEMP,,,,,,,,
MPTEMP,1,0
MPDATA,DENS,2,,3.935E+05
MPTEMP,,,,,,,,
MPTEMP,1,0
MPDATA,EX,2,,2.0604E+11
MPDATA,PRXY,2,,0.3
SAVE
SAVE
SECTYPE,   1, BEAM, RECT, , 0
SECOFFSET, CENT
SECDATA,0.01,0.01,0,0,0,0,0,0,0,0,0,0
K,6,0,0.5,-0.108255,
K,5,-0.125,0.5,0.108255,
K,4,0.125,0.5,0.108255,
K,3,-0.108,0,-0.125,
K,1,0.108255,0,0,
K,2,-0.108255,0,0.125,
K,3,-0.108255,0,0.125,
K,4,0.125,0.5,0.108255,
K,5,-0.125,0.5,0.108255,
K,6,0,0.5,-0.108255,
L,       1,       5
K,2,-0.108255,0,-0.125,
FINISH
/CLEAR,START
/COM,ANSYS RELEASE 2023 R1           BUILD 23.1      UP20221128       18:32:30
/input,start,ans,'C:\Program Files\ANSYS Inc\ANSYS Student\v231\ANSYS\apdl\'
/NOPR
KEYW,PR_SET,1
KEYW,PR_STRUC,1
KEYW,PR_THERM,0
KEYW,PR_FLUID,0
KEYW,PR_ELMAG,0
KEYW,MAGNOD,0
KEYW,MAGEDG,0
KEYW,MAGHFE,0
KEYW,MAGELC,0
KEYW,PR_MULTI,0
/GO
/COM,
/COM,Preferences for GUI filtering have been set to display:
/COM,  Structural
/PREP7
ET,1,LINK180
ET,2,LINK180
ETDEL,2
MPWRITE,'TenseMat',' ','..\..\..\..\'
MPTEMP,,,,,,,,
MPTEMP,1,0
MPDATA,DENS,1,,7870
MPTEMP,,,,,,,,
MPTEMP,1,0
MPDATA,EX,1,,7.5999E+10
MPDATA,PRXY,1,,0.3
MPTEMP,,,,,,,,
MPTEMP,1,0
UIMP,1,REFT,,,
MPDATA,ALPX,1,,6.5E-06
MPTEMP,,,,,,,,
MPTEMP,1,0
MPDE,DENS,1
MPDATA,DENS,1,,7870
MPTEMP,,,,,,,,
MPTEMP,1,0
MPDATA,DENS,2,,3.935E+05
MPTEMP,,,,,,,,
MPTEMP,1,0
MPDATA,EX,2,,2.0604E+11
MPDATA,PRXY,2,,0.3
MPTEMP,,,,,,,,
MPTEMP,1,0
UIMP,2,REFT,,,
MPDATA,ALPX,2,,6.5E-06
MPWRITE,'TenseMat','mp','..\..\..\..\'
SECTYPE,   1, BEAM, RECT, , 0
SECOFFSET, CENT
SECDATA,0.01,0.01,0,0,0,0,0,0,0,0,0,0
SECTYPE,   2, BEAM, CSOLID, , 0
SECOFFSET, CENT
SECDATA,0.0008,0,0,0,0,0,0,0,0,0,0,0
SECTYPE,   2, BEAM, CSOLID, , 0
SECOFFSET, CENT
SECDATA,0.0008,0,0,0,0,0,0,0,0,0,0,0
K,1,0.108255,0,0,
K,2,-0.108255,0,0.12500,
K,3,-0.108255,0,-0.125,
K,4,0.125,0.5,0.108255,
K,5,-0.125,0.5,0.108255,
K,6,0,0.5,-0.108255,
K,6,0,0.5,-0.108255,
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N,6,0,0.5,-0.108255,,,,
L,       1,       5
L,       2,       6
L,       3,       4
L,       4,       5
L,       5,       4
L,       5,       6
L,       6,       4
L,       1,       4
L,       3,       6
L,       2,       5
FLST,5,6,4,ORDE,2
FITEM,5,4
FITEM,5,-9
CM,_Y,LINE
LSEL, , , ,P51X
CM,_Y1,LINE
CMSEL,S,_Y
CMSEL,S,_Y1
LATT,2, ,1, , , ,2
CMSEL,S,_Y
CMDELE,_Y
CMDELE,_Y1
FLST,5,3,4,ORDE,2
FITEM,5,1
FITEM,5,-3
CM,_Y,LINE
LSEL, , , ,P51X
CM,_Y1,LINE
CMSEL,S,_Y
CMSEL,S,_Y1
LATT,1, ,1, , , ,1
CMSEL,S,_Y
CMDELE,_Y
CMDELE,_Y1
FLST,5,9,4,ORDE,2
FITEM,5,1
FITEM,5,-9
CM,_Y,LINE
LSEL, , , ,P51X
CM,_Y1,LINE
CMSEL,,_Y
LESIZE,_Y1, , ,10, , , , ,1
FLST,2,3,1,ORDE,2
FITEM,2,1
FITEM,2,-3
/GO
D,P51X,ALL, , , , , , , , , ,
FLST,2,3,1,ORDE,2
FITEM,2,4
FITEM,2,-6
/GO
F,P51X,FY,-5000
FINISH
/SOL
/STATUS,SOLU
SOLVE
FINISH
/PREP7
FLST,2,3,3,ORDE,2
FITEM,2,1
FITEM,2,-3
/GO
DK,P51X, , , ,0,ALL, , , , , ,
FLST,2,3,3,ORDE,2
FITEM,2,4
FITEM,2,-6
/GO
FK,P51X,FY,-1000
FINISH
/SOL
/STATUS,SOLU
SOLVE
/STATUS,SOLU
SOLVE
FINISH
! /EXIT,NOSAV
/BATCH
/COM,ANSYS RELEASE 2023 R1           BUILD 23.1      UP20221128       16:42:17
/input,menust,tmp,''
/GST,ON
/PLO,INFO,3
/GRO,CURL,ON
/CPLANE,1
WPSTYLE,,,,,,,,0
/INPUT,'Tower_AR','txt','C:\Users\Abhinav\',, 0
/COM,ANSYS RELEASE 2023 R1           BUILD 23.1      UP20221128       16:43:13
/SHOW,WIN32C
SET,FIRST
/PLOPTS,INFO,3
/CONTOUR,ALL,18
/NUMBER,1
PLNSOL,S,EQV
PLNSOL,S,EQV
! /UIS,ABORT,1
/SHOW,WIN32
PLDISP,1
PLDISP,1
FINISH
/PREP7
MPTEMP,,,,,,,,
MPTEMP,1,0
UIMP,1,REFT,,,
MPDE,ALPX,1
MPDATA,ALPX,1,,6.5E-06
