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/BATCH
/COM,ANSYS RELEASE 2023 R1           BUILD 23.1      UP20221128       14:58:55
/input,menust,tmp,''
/GST,ON
/PLO,INFO,3
/GRO,CURL,ON
/CPLANE,1
WPSTYLE,,,,,,,,0
/INPUT,'Tower_AR','txt','C:\Users\Abhinav\',, 0
/COM,ANSYS RELEASE 2023 R1           BUILD 23.1      UP20221128       15:00:38
/NOPR
KEYW,PR_SET,1
KEYW,PR_STRUC,1
KEYW,PR_THERM,0
KEYW,PR_FLUID,0
KEYW,PR_ELMAG,0
KEYW,MAGNOD,0
KEYW,MAGEDG,0
KEYW,MAGHFE,0
KEYW,MAGELC,0
KEYW,PR_MULTI,0
/GO
/COM,
/COM,Preferences for GUI filtering have been set to display:
/COM,  Structural
/INPUT,'Tower_AR','txt','C:\Users\Abhinav\',, 0
/COM,ANSYS RELEASE 2023 R1           BUILD 23.1      UP20221128       15:01:12
FINISH
/PREP7
MPTEMP,,,,,,,,
MPTEMP,1,0
MPDE,EX,1
MPDE,NUXY,1
MPDE,PRXY,1
MPDATA,EX,1,,7.5999E+10
MPDATA,PRXY,1,,0.3
FINISH
/SOL
FLST,2,3,3,ORDE,2
FITEM,2,1
FITEM,2,-3
/GO
DK,P51X, , , ,0,ALL, , , , , ,
FLST,2,3,3,ORDE,2
FITEM,2,4
FITEM,2,-6
/GO
FK,P51X,FY,-1000
FLST,2,3,3,ORDE,2
FITEM,2,4
FITEM,2,-6
/GO
FK,P51X,FZ,-1000
/STATUS,SOLU
SOLVE
FINISH
/POST1
/EFACET,1
PLNSOL, S,EQV, 1,1.0
/EFACET,1
PLNSOL, S,EQV, 1,1.0
/SHRINK,0
/ESHAPE,1.0
/EFACET,1
/RATIO,1,1,1
/CFORMAT,32,0
SET,LIST
/SHRINK,0
/ESHAPE,0.0
/EFACET,1
/RATIO,1,1,1
/CFORMAT,32,0
/SHRINK,0
/ESHAPE,0.0
/EFACET,1
/RATIO,1,1,1
/CFORMAT,32,0
/SHOW,WIN32C
SET,FIRST
/PLOPTS,INFO,3
/CONTOUR,ALL,18
/NUMBER,1
PLNSOL,S,EQV
SET,,,,,,,2
PLNSOL,S,EQV
SET,,,,,,,3
PLNSOL,S,EQV
SET,,,,,,,4
PLNSOL,S,EQV
SET,,,,,,,5
PLNSOL,S,EQV
SET,,,,,,,6
PLNSOL,S,EQV
SET,,,,,,,7
PLNSOL,S,EQV
SET,,,,,,,8
PLNSOL,S,EQV
SET,,,,,,,9
PLNSOL,S,EQV
SET,,,,,,,7
PLNSOL,S,EQV
SET,,,,,,,8
PLNSOL,S,EQV
SET,,,,,,,9
PLNSOL,S,EQV
SET,,,,,,,8
PLNSOL,S,EQV
SET,,,,,,,9
PLNSOL,S,EQV
SET,,,,,,,10
PLNSOL,S,EQV
SET,,,,,,,11
PLNSOL,S,EQV
SET,,,,,,,12
PLNSOL,S,EQV
SET,,,,,,,13
PLNSOL,S,EQV
SET,,,,,,,14
PLNSOL,S,EQV
SET,,,,,,,15
PLNSOL,S,EQV
SET,,,,,,,14
PLNSOL,S,EQV
SET,,,,,,,15
PLNSOL,S,EQV
SET,,,,,,,1
PLNSOL,S,EQV
PLNSOL,S,EQV
SET,,,,,,,2
PLNSOL,S,EQV
SET,,,,,,,3
PLNSOL,S,EQV
SET,,,,,,,4
PLNSOL,S,EQV
SET,,,,,,,5
PLNSOL,S,EQV
SET,,,,,,,6
PLNSOL,S,EQV
SET,,,,,,,7
PLNSOL,S,EQV
SET,,,,,,,8
PLNSOL,S,EQV
SET,,,,,,,9
PLNSOL,S,EQV
SET,,,,,,,10
PLNSOL,S,EQV
SET,,,,,,,11
PLNSOL,S,EQV
SET,,,,,,,12
PLNSOL,S,EQV
SET,,,,,,,13
PLNSOL,S,EQV
SET,,,,,,,14
PLNSOL,S,EQV
SET,,,,,,,15
PLNSOL,S,EQV
EPLOT
FINISH
/POST26
FILE,'tower','rst','.'
NUMVAR,200
SOLU,191,NCMIT
STORE,MERGE
FILLDATA,191,,,,1,1
REALVAR,191,191
FINISH
/POST1
FILE,'tower','rst','.'
EPLOT
PLNS,S,EQV
ANDATA,0.5, ,0,0,0,1,0,1
! /UIS,ABORT,1
/SHOW,WIN32
SAVE
SAVE
FINISH
! /EXIT,ALL
/BATCH
/COM,ANSYS RELEASE 2023 R1           BUILD 23.1      UP20221128       16:30:27
/input,menust,tmp,''
/GST,ON
/PLO,INFO,3
/GRO,CURL,ON
/CPLANE,1
WPSTYLE,,,,,,,,0
/SOLU
/STATUS,SOLU
SOLVE
FINISH
! /EXIT,NOSAV
/BATCH
/COM,ANSYS RELEASE 2023 R1           BUILD 23.1      UP20221128       16:35:16
/input,menust,tmp,''
/GST,ON
/PLO,INFO,3
/GRO,CURL,ON
/CPLANE,1
WPSTYLE,,,,,,,,0
/INPUT,'Tower_AR','txt','C:\Users\Abhinav\',, 0
/COM,ANSYS RELEASE 2023 R1           BUILD 23.1      UP20221128       16:36:01
/EFACET,1
PLNSOL, S,INT, 1,1.0
/SHRINK,0
/ESHAPE,1.0
/EFACET,1
/RATIO,1,1,1
/CFORMAT,32,0
/SHOW,WIN32C
SET,FIRST
/PLOPTS,INFO,3
/CONTOUR,ALL,18
/NUMBER,1
PLNSOL,S,EQV
! /UIS,ABORT,1
/SHOW,WIN32
/NOPR
KEYW,PR_SET,1
KEYW,PR_STRUC,1
KEYW,PR_THERM,0
KEYW,PR_FLUID,0
KEYW,PR_ELMAG,0
KEYW,MAGNOD,0
KEYW,MAGEDG,0
KEYW,MAGHFE,0
KEYW,MAGELC,0
KEYW,PR_MULTI,0
/GO
/COM,
/COM,Preferences for GUI filtering have been set to display:
/COM,  Structural
FINISH
/SOL
FINISH
/PREP7
/units, si
FLST,2,3,3,ORDE,2
FITEM,2,1
FITEM,2,-3
/GO
DK,P51X, , , ,0,ALL, , , , , ,
FLST,2,3,3,ORDE,2
FITEM,2,4
FITEM,2,-6
/GO
FK,P51X,FZ,-1000
FINISH
/SOL
/STATUS,SOLU
SOLVE
FINISH
/POST1
/EFACET,1
PLNSOL, S,EQV, 1,1.0
/SHRINK,0
/ESHAPE,0.0
/EFACET,1
/RATIO,1,1,1
/CFORMAT,32,0
/SHRINK,0
/ESHAPE,1.0
/EFACET,1
/RATIO,1,1,1
/CFORMAT,32,0
/SHRINK,0
/ESHAPE,1
/EFACET,1
/RATIO,1,1,1
/CFORMAT,32,0
/EFACET,1
PLNSOL, S,EQV, 0,1.0
/SHOW,WIN32C
SET,FIRST
/PLOPTS,INFO,3
/NUMBER,1
PLNSOL,S,EQV
SET,,,,,,,2
PLNSOL,S,EQV
SET,,,,,,,3
PLNSOL,S,EQV
SET,,,,,,,4
PLNSOL,S,EQV
SET,,,,,,,5
PLNSOL,S,EQV
SET,,,,,,,6
PLNSOL,S,EQV
SET,,,,,,,7
PLNSOL,S,EQV
SET,,,,,,,8
PLNSOL,S,EQV
SET,,,,,,,9
PLNSOL,S,EQV
SET,,,,,,,10
PLNSOL,S,EQV
SET,,,,,,,11
PLNSOL,S,EQV
SET,,,,,,,12
PLNSOL,S,EQV
SET,,,,,,,13
PLNSOL,S,EQV
SET,,,,,,,14
PLNSOL,S,EQV
SET,,,,,,,15
PLNSOL,S,EQV
SET,,,,,,,14
PLNSOL,S,EQV
SET,,,,,,,15
PLNSOL,S,EQV
SET,,,,,,,1
PLNSOL,S,EQV
SET,,,,,,,15
PLNSOL,S,EQV
! /UIS,ABORT,1
/SHOW,WIN32
/SHRINK,0
/ESHAPE,1
/EFACET,1
/RATIO,1,1,1
/CFORMAT,32,0
/SHRINK,0
/ESHAPE,1
/EFACET,1
/RATIO,1,1,1
/CFORMAT,32,0
PLDISP,1
PLDISP,0
/EFACET,1
PLNSOL, S,EQV, 1,1.0
/SHRINK,0
/ESHAPE,0.0
/EFACET,1
/RATIO,1,1,1
/CFORMAT,32,0
/SHRINK,0
/ESHAPE,0.0
/EFACET,1
/RATIO,1,1,1
/CFORMAT,32,0
FINISH
/PREP7
ET,2,BEAM188
ET,3,BEAM188
ETDEL,1
MPTEMP,,,,,,,,
MPTEMP,1,0
MPDE,EX,1
MPDE,NUXY,1
MPDE,PRXY,1
MPDATA,EX,1,,7.5999E+10
MPDATA,PRXY,1,,0.3
MPTEMP,,,,,,,,
MPTEMP,1,0
MPDE,EX,2
MPDE,NUXY,2
MPDE,PRXY,2
MPDATA,EX,2,,7.5999e+10
MPDATA,PRXY,2,,0.3
MPTEMP,,,,,,,,
MPTEMP,1,0
MPDATA,EX,3,,7.5999e+10
MPDATA,PRXY,3,,0.3
SECTYPE,   2, BEAM, CSOLID, , 0
SECOFFSET, CENT
SECDATA,0.01,0,0,0,0,0,0,0,0,0,0,0
SECTYPE,   2, BEAM, CSOLID, , 0
SECOFFSET, CENT
SECDATA,0.01,0,0,0,0,0,0,0,0,0,0,0
SECTYPE,   3, BEAM, CSOLID, , 0
SECOFFSET, CENT
SECDATA,0.0008,0,0,0,0,0,0,0,0,0,0,0
SECTYPE,   3, BEAM, CSOLID, , 0
SECOFFSET, CENT
SECDATA,0.0008,0,0,0,0,0,0,0,0,0,0,0
FLST,5,6,4,ORDE,2
FITEM,5,4
FITEM,5,-9
CM,_Y,LINE
LSEL, , , ,P51X
CM,_Y1,LINE
CMSEL,S,_Y
CMSEL,S,_Y1
LATT,3, ,3, , , ,3
CMSEL,S,_Y
CMDELE,_Y
CMDELE,_Y1
FLST,5,3,4,ORDE,2
FITEM,5,1
FITEM,5,-3
CM,_Y,LINE
LSEL, , , ,P51X
CM,_Y1,LINE
CMSEL,S,_Y
CMSEL,S,_Y1
LATT,2, ,2, , , ,2
CMSEL,S,_Y
CMDELE,_Y
CMDELE,_Y1
FINISH
/SOL
FINISH
/PREP7
FLST,2,3,3,ORDE,2
FITEM,2,1
FITEM,2,-3
/GO
DK,P51X, , , ,0,ALL, , , , , ,
FLST,2,3,3,ORDE,2
FITEM,2,4
FITEM,2,-6
/GO
FK,P51X,FZ,-10000
FINISH
/SOL
/STATUS,SOLU
SOLVE
FINISH
! /EXIT,NOSAV
/BATCH
/COM,ANSYS RELEASE 2023 R1           BUILD 23.1      UP20221128       16:53:06
/input,menust,tmp,''
/GST,ON
/PLO,INFO,3
/GRO,CURL,ON
/CPLANE,1
WPSTYLE,,,,,,,,0
/INPUT,'Tower_AR','txt','C:\Users\Abhinav\',, 0
/COM,ANSYS RELEASE 2023 R1           BUILD 23.1      UP20221128       16:53:35
FINISH
/SOL
FINISH
/PREP7
FLST,2,3,3,ORDE,2
FITEM,2,1
FITEM,2,-3
/GO
DK,P51X, , , ,0,ALL, , , , , ,
FLST,2,3,3,ORDE,2
FITEM,2,4
FITEM,2,-6
/GO
FK,P51X,FZ,-1000
FINISH
/SOL
/STATUS,SOLU
SOLVE
FINISH
/POST1
/EFACET,1
PLNSOL, S,EQV, 1,1.0
/EFACET,1
PLNSOL, S,EQV, 1,1.0
SAVE
SAVE
SAVE
SAVE
FINISH
! /EXIT,ALL
/BATCH
/COM,ANSYS RELEASE 2023 R1           BUILD 23.1      UP20221128       17:24:24
/input,menust,tmp,''
/GST,ON
/PLO,INFO,3
/GRO,CURL,ON
/CPLANE,1
WPSTYLE,,,,,,,,0
RESUME
/COM,ANSYS RELEASE 2023 R1           BUILD 23.1      UP20221128       17:24:35
FINISH
/FILNAME,tower,1
/BATCH
/COM,ANSYS RELEASE 2023 R1           BUILD 23.1      UP20221128       15:08:26
/input,menust,tmp,''
/GST,ON
/PLO,INFO,3
/GRO,CURL,ON
/CPLANE,1
WPSTYLE,,,,,,,,0
RESUME
/COM,ANSYS RELEASE 2023 R1           BUILD 23.1      UP20221128       15:10:18
FINISH
/FILNAME,tower,1
/BATCH
/COM,ANSYS RELEASE 2023 R1           BUILD 23.1      UP20221128       17:55:44
/input,menust,tmp,''
/GST,ON
/PLO,INFO,3
/GRO,CURL,ON
/CPLANE,1
WPSTYLE,,,,,,,,0
RESUME
/COM,ANSYS RELEASE 2023 R1           BUILD 23.1      UP20221128       17:56:08
FINISH
/FILNAME,tower,1
/BATCH
/COM,ANSYS RELEASE 2023 R1           BUILD 23.1      UP20221128       10:13:13
/input,menust,tmp,''
/GST,ON
/PLO,INFO,3
/GRO,CURL,ON
/CPLANE,1
WPSTYLE,,,,,,,,0
RESUME
/COM,ANSYS RELEASE 2023 R1           BUILD 23.1      UP20221128       10:13:47
RESUME
/COM,ANSYS RELEASE 2023 R1           BUILD 23.1      UP20221128       10:13:53
FINISH
/FILNAME,tower,1
/BATCH
/COM,ANSYS RELEASE 2023 R1           BUILD 23.1      UP20221128       10:31:25
/input,menust,tmp,''
/GST,ON
/PLO,INFO,3
/GRO,CURL,ON
/CPLANE,1
WPSTYLE,,,,,,,,0
FINISH
/FILNAME,tower,1
/BATCH
/COM,ANSYS RELEASE 2023 R1           BUILD 23.1      UP20221128       00:35:35
/input,menust,tmp,''
/GST,ON
/PLO,INFO,3
/GRO,CURL,ON
/CPLANE,1
WPSTYLE,,,,,,,,0
/INPUT,'Tower_AR','txt','C:\Users\Abhinav\',, 0
/COM,ANSYS RELEASE 2023 R1           BUILD 23.1      UP20221128       00:40:01
/NOPR
KEYW,PR_SET,1
KEYW,PR_STRUC,1
KEYW,PR_THERM,0
KEYW,PR_FLUID,0
KEYW,PR_ELMAG,0
KEYW,MAGNOD,0
KEYW,MAGEDG,0
KEYW,MAGHFE,0
KEYW,MAGELC,0
KEYW,PR_MULTI,0
/GO
/COM,
/COM,Preferences for GUI filtering have been set to display:
/COM,  Structural
FINISH
/PREP7
KEYOPT,1,2,0
KEYOPT,1,12,0
MPTEMP,,,,,,,,
MPTEMP,1,0
MPDE,EX,1
MPDE,NUXY,1
MPDE,PRXY,1
MPDATA,EX,1,,7.5999E+10
MPDATA,PRXY,1,,0.3
FLST,5,9,4,ORDE,2
FITEM,5,1
FITEM,5,-9
CM,_Y,LINE
LSEL, , , ,P51X
CM,_Y1,LINE
CMSEL,S,_Y
CMSEL,S,_Y1
LATT,1, ,1, , , ,1
CMSEL,S,_Y
CMDELE,_Y
CMDELE,_Y1
FLST,5,9,4,ORDE,2
FITEM,5,1
FITEM,5,-9
CM,_Y,LINE
LSEL, , , ,P51X
CM,_Y1,LINE
CMSEL,,_Y
LESIZE,_Y1, , ,10, , , , ,1
FINISH
/SOL
FINISH
/PREP7
FLST,2,3,1,ORDE,3
FITEM,2,1
FITEM,2,3
FITEM,2,5
/GO
D,P51X,UY, , , , , , , , , ,
FLST,2,3,3,ORDE,2
FITEM,2,1
FITEM,2,-3
DKDELE,P51X,ALL
FLST,2,3,3,ORDE,2
FITEM,2,1
FITEM,2,-3
/GO
DK,P51X, , , ,0,UZ, , , , , ,
FLST,2,3,3,ORDE,2
FITEM,2,4
FITEM,2,-6
/GO
FK,P51X,FZ,-1000
FINISH
/SOL
/STATUS,SOLU
SOLVE
/STATUS,SOLU
SOLVE
FINISH
/PREP7
LSCLEAR,ALL
FINISH
/SOL
FLST,2,3,1,ORDE,3
FITEM,2,1
FITEM,2,3
FITEM,2,5
/GO
D,P51X,ALL, , , , , , , , , ,
FLST,2,3,1,ORDE,3
FITEM,2,2
FITEM,2,4
FITEM,2,6
/GO
F,P51X,FZ,-1000
/STATUS,SOLU
SOLVE
FINISH
/POST1
PLDISP,1
PLDISP,1
/SHOW,WIN32C
SET,FIRST
/PLOPTS,INFO,3
/CONTOUR,ALL,18
/NUMBER,1
PLNSOL,S,EQV
PLNSOL,S,EQV
PLNSOL,S,EQV
PLNSOL,S,EQV
PLNSOL,S,EQV
PLNSOL,S,EQV
PLNSOL,S,EQV
PLNSOL,S,EQV
PLNSOL,S,EQV
! /UIS,ABORT,1
/SHOW,WIN32
/SHRINK,0
/ESHAPE,1.0
/EFACET,1
/RATIO,1,1,1
/CFORMAT,32,0
PLDISP,1
/SHOW,WIN32C
SET,FIRST
/PLOPTS,INFO,3
/NUMBER,1
PLNSOL,S,EQV
PLNSOL,S,EQV
PLNSOL,S,EQV
PLNSOL,S,EQV
PLNSOL,S,EQV
PLNSOL,S,EQV
PLNSOL,S,EQV
! /UIS,ABORT,1
/SHOW,WIN32
SAVE
SAVE
SAVE
SAVE
SAVE
RAPPND,1, ,
FINISH
/SOL
FINISH
/PREP7
FLST,2,3,3,ORDE,2
FITEM,2,4
FITEM,2,-6
/GO
FK,P51X,FZ,-1000
FLST,2,3,3,ORDE,2
FITEM,2,1
FITEM,2,-3
/GO
DK,P51X, , , ,0,ALL, , , , , ,
FINISH
/POST1
FINISH
/SOL
/STATUS,SOLU
SOLVE
FINISH
/POST1
FINISH
/SOL
NSUBST,20,0,0
/STATUS,SOLU
SOLVE
NSUBST,20,20,20
/STATUS,SOLU
SOLVE
FINISH
/POST1
/SHOW,WIN32C
SET,FIRST
/PLOPTS,INFO,3
/NUMBER,1
PLNSOL,S,EQV
PLDISP,1
ANDSCL,50,0.5
PLDISP,1
ANDSCL,50,0.5
SET,,,,,,,2
PLNSOL,S,EQV
SET,,,,,,,1
PLNSOL,S,EQV
SET,,,,,,,2
PLNSOL,S,EQV
SET,,,,,,,1
PLNSOL,S,EQV
SET,,,,,,,2
PLNSOL,S,EQV
SET,,,,,,,1
PLNSOL,S,EQV
SET,,,,,,,2
PLNSOL,S,EQV
SET,,,,,,,1
PLNSOL,S,EQV
SET,,,,,,,2
PLNSOL,S,EQV
SET,,,,,,,1
PLNSOL,S,EQV
SET,,,,,,,2
PLNSOL,S,EQV
SET,,,,,,,1
PLNSOL,S,EQV
SET,,,,,,,2
PLNSOL,S,EQV
SET,,,,,,,1
PLNSOL,S,EQV
SET,,,,,,,2
PLNSOL,S,EQV
SET,,,,,,,1
PLNSOL,S,EQV
SET,,,,,,,2
PLNSOL,S,EQV
SET,,,,,,,1
PLNSOL,S,EQV
SET,,,,,,,2
PLNSOL,S,EQV
SET,,,,,,,1
PLNSOL,S,EQV
SET,,,,,,,2
PLNSOL,S,EQV
SET,,,,,,,1
PLNSOL,S,EQV
SET,,,,,,,2
PLNSOL,S,EQV
SET,,,,,,,1
PLNSOL,S,EQV
SET,,,,,,,2
PLNSOL,S,EQV
SET,,,,,,,1
PLNSOL,S,EQV
SET,,,,,,,2
PLNSOL,S,EQV
SET,,,,,,,1
PLNSOL,S,EQV
SET,,,,,,,2
PLNSOL,S,EQV
SET,,,,,,,1
PLNSOL,S,EQV
SET,,,,,,,2
PLNSOL,S,EQV
SET,,,,,,,1
PLNSOL,S,EQV
! /UIS,ABORT,1
/SHOW,WIN32
FINISH
/SOL
NSUBST,20,20,0
PSTRES,1
FINISH
/POST1
FINISH
/SOL
LSCLEAR,ALL
FLST,2,3,3,ORDE,2
FITEM,2,1
FITEM,2,-3
/GO
DK,P51X, , , ,0,ALL, , , , , ,
FLST,2,3,3,ORDE,2
FITEM,2,4
FITEM,2,-6
/GO
FK,P51X,FZ,-1000
/STATUS,SOLU
SOLVE
/STATUS,SOLU
SOLVE
FINISH
/PREP7
LSCLEAR,ALL
FKDELE,ALL,ALL
FDELE,ALL,ALL
FINISH
/SOL
/STATUS,SOLU
SOLVE
FINISH
/PREP7
FLST,2,3,3,ORDE,2
FITEM,2,4
FITEM,2,-6
/GO
FK,P51X,FZ,-1000
FLST,2,3,3,ORDE,2
FITEM,2,1
FITEM,2,-3
/GO
DK,P51X, , , ,0,ALL, , , , , ,
FINISH
/SOL
/STATUS,SOLU
SOLVE
FINISH
/POST1
PLDISP,1
/EFACET,1
PLNSOL, S,EQV, 1,1.0
PRNSOL,S,PRIN
PRNSOL,S,PRIN
PRNSOL,U,Z
PRNSOL,U,Y
/BATCH
/COM,ANSYS RELEASE 2023 R1           BUILD 23.1      UP20221128       13:17:57
/input,menust,tmp,''
/GST,ON
/PLO,INFO,3
/GRO,CURL,ON
/CPLANE,1
WPSTYLE,,,,,,,,0
RESUME
/COM,ANSYS RELEASE 2023 R1           BUILD 23.1      UP20221128       13:18:47
FINISH
/FILNAME,tower,1
/BATCH
/COM,ANSYS RELEASE 2023 R1           BUILD 23.1      UP20221128       16:17:38
/input,menust,tmp,''
/GST,ON
/PLO,INFO,3
/GRO,CURL,ON
/CPLANE,1
WPSTYLE,,,,,,,,0
RESUME
/COM,ANSYS RELEASE 2023 R1           BUILD 23.1      UP20221128       16:17:47
FINISH
/FILNAME,tower,1
/BATCH
/COM,ANSYS RELEASE 2023 R1           BUILD 23.1      UP20221128       11:48:38
/input,menust,tmp,''
/GST,ON
/PLO,INFO,3
/GRO,CURL,ON
/CPLANE,1
WPSTYLE,,,,,,,,0
FINISH
/FILNAME,tower,1
/BATCH
/COM,ANSYS RELEASE 2023 R1           BUILD 23.1      UP20221128       13:08:12
/input,menust,tmp,''
/GST,ON
/PLO,INFO,3
/GRO,CURL,ON
/CPLANE,1
WPSTYLE,,,,,,,,0
RESUME
/COM,ANSYS RELEASE 2023 R1           BUILD 23.1      UP20221128       13:08:16
FINISH
/FILNAME,tower,1
