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/BATCH
/COM,ANSYS RELEASE 2023 R1           BUILD 23.1      UP20221128       17:28:47
RESUME,'tower','db','.'
/COM,ANSYS RELEASE 2023 R1           BUILD 23.1      UP20221128       17:28:47
/POST1
PLDISP,1
PLDISP,1
FINISH
! /EXIT,ALL
/BATCH
/COM,ANSYS RELEASE 2023 R1           BUILD 23.1      UP20221128       15:10:30
RESUME,'tower','dbb','.'
/COM,ANSYS RELEASE 2023 R1           BUILD 23.1      UP20221128       15:10:30
RESUME
/COM,ANSYS RELEASE 2023 R1           BUILD 23.1      UP20221128       15:10:33
/POST1
PLDISP,1
PLDISP,1
WPSTYLE,,,,,,,,1
WPSTYLE,,,,,,,,0
WPSTYL, STAT
/NOPR
KEYW,PR_SET,1
KEYW,PR_STRUC,1
KEYW,PR_THERM,0
KEYW,PR_FLUID,0
KEYW,PR_ELMAG,0
KEYW,MAGNOD,0
KEYW,MAGEDG,0
KEYW,MAGHFE,0
KEYW,MAGELC,0
KEYW,PR_MULTI,0
/GO
/COM,
/COM,Preferences for GUI filtering have been set to display:
/COM,  Structural
FINISH
/PREP7
FINISH
/SOL
FINISH
/POST1
/EFACET,1
PLNSOL, S,EQV, 1,1.0
/SHOW,WIN32C
SET,FIRST
/PLOPTS,INFO,3
/CONTOUR,ALL,18
/NUMBER,1
PLNSOL,S,EQV
PLDISP,0
ANDSCL,10,0.5
! /UIS,ABORT,1
/SHOW,WIN32
FINISH
! /EXIT,ALL
/BATCH
/COM,ANSYS RELEASE 2023 R1           BUILD 23.1      UP20221128       17:56:14
RESUME,'tower','dbb','.'
/COM,ANSYS RELEASE 2023 R1           BUILD 23.1      UP20221128       17:56:15
/POST1
PLDISP,0
/EFACET,1
PLNSOL, S,EQV, 1,1.0
/EFACET,1
PLNSOL, S,EQV, 1,1.0
PLDISP,1
/SHOW,WIN32C
SET,FIRST
/PLOPTS,INFO,3
/CONTOUR,ALL,18
/NUMBER,1
PRNSOL,EPEL,PRIN
PLNSOL,EPEL,EQV
PRNSOL,EPEL,PRIN
PLNSOL,EPEL,EQV
PLNSOL,EPEL,EQV
*CSET,1,2,EPEL,EQV
PLNS,S,EQV
ANMODE,10,0.5, ,0
PLNSOL,EPPL,EQV
PLNSOL,EPTH,EQV
SET,,,,,,,2
PLNSOL,EPTH,EQV
SET,,,,,,,3
PLNSOL,EPTH,EQV
SET,,,,,,,4
PLNSOL,EPTH,EQV
SET,,,,,,,5
PLNSOL,EPTH,EQV
SET,,,,,,,6
PLNSOL,EPTH,EQV
SET,,,,,,,7
PLNSOL,EPTH,EQV
SET,,,,,,,8
PLNSOL,EPTH,EQV
SET,,,,,,,12
PLNSOL,EPTH,EQV
SET,,,,,,,15
PLNSOL,EPTH,EQV
SET,,,,,,,14
PLNSOL,EPTH,EQV
SET,,,,,,,3
PLNSOL,EPTH,EQV
! /UIS,ABORT,1
/SHOW,WIN32
FLST,2,6,1
FITEM,2,1
FITEM,2,5
FITEM,2,3
FITEM,2,4
FITEM,2,2
FITEM,2,6
PATH,chart,6,30,20,
PPATH,P51X,1
PATH,STAT
AVPRIN,0, ,
PDEF, ,U,Z,AVG
/PBC,PATH, ,0
AVPRIN,0, ,
PDEF, ,U,Y,AVG
/PBC,PATH, ,0
AVPRIN,0, ,
PDEF, ,U,X,AVG
/PBC,PATH, ,0
AVPRIN,0, ,
PDEF, ,S,EQV,AVG
/PBC,PATH, ,0
AVPRIN,0, ,
PDEF, ,S,EQV,AVG
/PBC,PATH, ,0
/BATCH
/COM,ANSYS RELEASE 2023 R1           BUILD 23.1      UP20221128       10:14:01
RESUME,'tower','dbb','.'
/COM,ANSYS RELEASE 2023 R1           BUILD 23.1      UP20221128       10:14:02
/SOLU
FINISH
/POST1
/EFACET,1
PLNSOL, S,EQV, 1,1.0
FINISH
! /EXIT,ALL
/BATCH
/COM,ANSYS RELEASE 2023 R1           BUILD 23.1      UP20221128       10:31:37
RESUME,'tower','dbb','.'
/COM,ANSYS RELEASE 2023 R1           BUILD 23.1      UP20221128       10:31:37
/PREP7
FINISH
/POST1
PLDISP,1
PLDISP,1
FINISH
/PREP7
KEYOPT,1,2,0
KEYOPT,1,12,0
FINISH
! /EXIT,ALL
/BATCH
/COM,ANSYS RELEASE 2023 R1           BUILD 23.1      UP20221128       13:18:59
RESUME,'tower','dbb','.'
/COM,ANSYS RELEASE 2023 R1           BUILD 23.1      UP20221128       13:18:59
/PREP7
MPTEMP,,,,,,,,
MPTEMP,1,0
MPDE,EX,2
MPDE,NUXY,2
MPDE,PRXY,2
MPDATA,EX,2,,2.0604E+11
MPDATA,PRXY,2,,0.3
MPTEMP,,,,,,,,
MPTEMP,1,0
MPDE,DENS,2
MPDATA,DENS,2,,3.935E+05
MPTEMP,,,,,,,,
MPTEMP,1,0
MPDE,EX,2
MPDE,PRXY,2
MPDATA,EX,2,,2.0604E+11
MPDATA,PRXY,2,,0.3
MPTEMP,,,,,,,,
MPTEMP,1,0
UIMP,2,REFT,,,
MPDE,ALPX,2
MPDATA,ALPX,2,,6.5E-06
MPTEMP,,,,,,,,
MPTEMP,1,0
MPDE,DENS,1
MPDATA,DENS,1,,7870
MPTEMP,,,,,,,,
MPTEMP,1,0
MPDE,EX,1
MPDE,NUXY,1
MPDE,PRXY,1
MPDATA,EX,1,,7.5999E+10
MPDATA,PRXY,1,,0.3
MPTEMP,,,,,,,,
MPTEMP,1,0
UIMP,1,REFT,,,
MPDE,ALPX,1
MPDATA,ALPX,1,,6.5E-06
FINISH
! /EXIT,ALL
/BATCH
/COM,ANSYS RELEASE 2023 R1           BUILD 23.1      UP20221128       16:17:55
RESUME,'tower','dbb','.'
/COM,ANSYS RELEASE 2023 R1           BUILD 23.1      UP20221128       16:17:55
/NOPR
KEYW,PR_SET,1
KEYW,PR_STRUC,1
KEYW,PR_THERM,0
KEYW,PR_FLUID,0
KEYW,PR_ELMAG,0
KEYW,MAGNOD,0
KEYW,MAGEDG,0
KEYW,MAGHFE,0
KEYW,MAGELC,0
KEYW,PR_MULTI,0
/GO
/COM,
/COM,Preferences for GUI filtering have been set to display:
/COM,  Structural
/PREP7
FINISH
/SOL
/STATUS,SOLU
SOLVE
/SHRINK,0
/ESHAPE,1
/EFACET,1
/RATIO,1,1,1
/CFORMAT,32,0
/SHRINK,0
/ESHAPE,1
/EFACET,1
/RATIO,1,1,1
/CFORMAT,32,0
FINISH
/POST1
PLDISP,1
/SHOW,WIN32C
SET,FIRST
/PLOPTS,INFO,3
/NUMBER,1
! /UIS,ABORT,1
/SHOW,WIN32
FINISH
! /EXIT,ALL
/BATCH
/COM,ANSYS RELEASE 2023 R1           BUILD 23.1      UP20221128       11:49:40
RESUME,'tower','dbb','.'
/COM,ANSYS RELEASE 2023 R1           BUILD 23.1      UP20221128       11:49:40
GPLOT
/SOLU
FINISH
/PREP7
/NUMBER,1
/NUMBER,1
GPLOT
RESUME
/COM,ANSYS RELEASE 2023 R1           BUILD 23.1      UP20221128       11:55:09
/NUMBER,1
/NUMBER,1
GPLOT
/NUMBER,1
/NUMBER,1
! /prestress
alist, all
ASUM, DEFAULT
LPLOT
klist,all,,,coord
alist, all
GPLOT
FINISH
! /EXIT,NOSAV
/BATCH
/COM,ANSYS RELEASE 2023 R1           BUILD 23.1      UP20221128       13:08:21
RESUME,'tower','dbb','.'
/COM,ANSYS RELEASE 2023 R1           BUILD 23.1      UP20221128       13:08:21
GPLOT
/NUMBER,1
/NUMBER,1
GPLOT
/NUMBER,1
/NUMBER,1
GPLOT
FINISH
! /EXIT,NOSAV
